// COMSOL Multiphysics 5.3.0.223 model "PipeDefect.mph"
// Correct Simulation to replicate the paper
// This is the 2nd correct simulation, should try to now incorporate  the correct material and check upon radiative heat transfer
// Outline of the model tree

Parameters
  id = (113-15)[mm]  // inlet diameter of pipe
  od = 113[mm]  // outlet diameter of pipe
  hp = 500[mm]  // height of pipe
  cd1 = (od-id)/2*0.509995979751087  // cut depth -1
  t = 0[s]  // Initial time
  cd2 = 3.7[mm]  // cut depth -2
  cl = hp*0.10839859104602  // cut length
  theta = 101.784077160932

Functions
  step1: Step | location = 0.05

Geometry
  geom1 "Geometry 1" (3D, length unit m)
    wp1: WorkPlane | unite = on
      r1: Rectangle | pos = {id/2, 0}; size = {(od-id)/2, hp}
      r2: Rectangle (disabled) | pos = {id, hp/2 - hp/10}; size = {cd, hp/5}
      dif1: Difference (disabled) | input = r1; input2 = r2
    rev1: Revolve | workplane = wp1; input = wp1; angtype = full
    wp2: WorkPlane | unite = on
      r2: Rectangle (disabled) | pos = {id/2, 52[mm]}; size = {cd1, cl}
      r3: Rectangle (disabled) | pos = {id/2, 52[mm] + 2*cl}; size = {cd2, cl}
      r4: Rectangle | pos = {id/2, hp/2- cl/2}; size = {cd1, cl}
      r5: Rectangle (disabled) | pos = {id/2, 52[mm] + 6*cl}; size = {cd2, cl}
    rev2: Revolve | workplane = wp2; input = wp2; angle1 = 90-theta/2; angle2 = 90+theta/2
    dif1: Difference | input = rev1; input2 = rev2
    blk1: Block | pos = {0, hp/2, 0}; base = center; size = {od*3, hp, od*5}
    blk2: Block | pos = {od*0.75, hp/2, 0}; base = center; size = {od*1.5, hp, od*5}
    dif2: Difference | input = blk1, dif1; input2 = blk2
    fin: Finalize "Form Union"

Materials
  mat1: Common "Air" on domains 1
    def "Basic"
      relpermeability = 1
      relpermittivity = 1
      dynamicviscosity = eta(T[1/K])[Pa*s]
      ratioofspecificheat = 1.4
      electricconductivity = 0[S/m]
      heatcapacity = Cp(T[1/K])[J/(kg*K)]
      density = rho(pA[1/Pa],T[1/K])[kg/m^3]
      thermalconductivity = k(T[1/K])[W/(m*K)]
      soundspeed = cs(T[1/K])[m/s]
      eta: Piecewise | arg = T; pieces = {200.0, 1600.0, -8.38278E-7+8.35717342E-8*T^1-7.69429583E-11*T^2+4.6437266E-14*T^3-1.06585607E-17*T^4}
      Cp: Piecewise | arg = T; pieces = {200.0, 1600.0, 1047.63657-0.372589265*T^1+9.45304214E-4*T^2-6.02409443E-7*T^3+1.2858961E-10*T^4}
      rho: Analytic | expr = pA*0.02897/8.314/T; args = {pA, T}; dermethod = manual; argders = {{pA, d(pA*0.02897/8.314/T,pA)}, {T, d(pA*0.02897/8.314/T,T)}}
      k: Piecewise | arg = T; pieces = {200.0, 1600.0, -0.00227583562+1.15480022E-4*T^1-7.90252856E-8*T^2+4.11702505E-11*T^3-7.43864331E-15*T^4}
      cs: Analytic | expr = sqrt(1.4*287*T); args = T; dermethod = manual; argders = {T, d(sqrt(1.4*287*T),T)}
    RefractiveIndex
      n = 1
      ki = 0
  mat2: Common "Aluminum 6063-T83" on domains 2
    def "Basic"
      relpermeability = 1
      electricconductivity = 3.030e7[S/m]
      thermalexpansioncoefficient = 23.4e-6[1/K]
      heatcapacity = 900[J/(kg*K)]
      relpermittivity = 1
      density = 2700[kg/m^3]
      thermalconductivity = 201[W/(m*K)]
    Enu "Young's modulus and Poisson's ratio"
      youngsmodulus = 69e9[Pa]
      poissonsratio = 0.33
  mat3: Common "Water, liquid" on domains 3
    def "Basic"
      dynamicviscosity = eta(T[1/K])[Pa*s]
      ratioofspecificheat = 1.0
      electricconductivity = 5.5e-6[S/m]
      heatcapacity = Cp(T[1/K])[J/(kg*K)]
      density = rho(T[1/K])[kg/m^3]
      thermalconductivity = k(T[1/K])[W/(m*K)]
      soundspeed = cs(T[1/K])[m/s]
      eta: Piecewise
        arg = T
        pieces = 
          {273.15, 413.15, 1.3799566804-0.021224019151*T^1+1.3604562827E-4*T^2-4.6454090319E-7*T^3+8.9042735735E-10*T^4-9.0790692686E-13*T^5+3.8457331488E-16*T^6}
          {413.15, 553.75, 0.00401235783-2.10746715E-5*T^1+3.85772275E-8*T^2-2.39730284E-11*T^3}
      Cp: Piecewise | arg = T; pieces = {273.15, 553.75, 12010.1471-80.4072879*T^1+0.309866854*T^2-5.38186884E-4*T^3+3.62536437E-7*T^4}
      rho: Piecewise | arg = T; pieces = {273.15, 553.75, 838.466135+1.40050603*T^1-0.0030112376*T^2+3.71822313E-7*T^3}
      k: Piecewise | arg = T; pieces = {273.15, 553.75, -0.869083936+0.00894880345*T^1-1.58366345E-5*T^2+7.97543259E-9*T^3}
      cs: Interpolation | table = {{273, 1403}, {278, 1427}, {283, 1447}, {293, 1481}, {303, 1507}, {313, 1526}, {323, 1541}, {333, 1552}, {343, 1555}, {353, 1555}, {363, 1550}, {373, 1543}}; interp = piecewisecubic
  mat4: Common "Silica glass" (disabled) on domains 2
    def "Basic"
      relpermeability = 1
      electricconductivity = 1e-14[S/m]
      thermalexpansioncoefficient = 0.55e-6[1/K]
      heatcapacity = 703[J/(kg*K)]
      relpermittivity = 2.09
      density = 2203[kg/m^3]
      thermalconductivity = 1.38[W/(m*K)]
    Enu "Young's modulus and Poisson's ratio"
      youngsmodulus = 73.1e9[Pa]
      poissonsratio = 0.17
    RefractiveIndex
      n = 1.45
      ki = 0

Physics
  ht: HeatTransferInSolidsAndFluids "Heat Transfer" on all domains
    dependent variable T
    ShapeProperty.order_temperature = 1
    PhysicalModelProperty.SurfaceToSurfaceRadiation = 1
    PhysicalModelProperty.RadiationInParticipatingMedia = 0
    solid1: SolidHeatTransferModel "Pipe" (default)
      opac1: Opacity (default)
        opacity = 1
        opacitySolarB1 = 1
        opacitySolarB2 = 1
        opacityB1 = 1
        opacityB2 = 1
        opacityB3 = 1
        opacityB4 = 1
        opacityB5 = 1
    fluid1: FluidHeatTransferModel "Air" on domains 1
      opac1: Opacity (default)
    init1: init "Initial Values - Air" (default)
    ins1: ThermalInsulation (default)
    fluid2: FluidHeatTransferModel "Water" on domains 3
      opac1: Opacity (default)
    temp1: TemperatureBoundary "Inlet Water Temperature" on boundaries 14 | T0 = 500[K]
    ofl1: ConvectiveOutflow "Air Outlet" on boundaries 1, 2, 4, 5
    ofl2: ConvectiveOutflow "Water Outlet" on boundaries 15
    init2: init "Initial Values - Water +Pipe" on domains 2, 3 | Tinit = 500[K]
    temp2: TemperatureBoundary "Boundary Air temperature" on boundaries 3 | T0_src = root.comp1.ht.T_amb
    ds1: DiffuseSurface (disabled) on no boundaries
      IncludeSurfaceToSurfaceRadiation = 1
      epsilon_rad_mat = userdef
      epsilon_rad = 0.85
    sym1: Symmetry on boundaries 20-24
  spf: LaminarFlow on domains 1, 3
    dependent variable u = {u, v, w}
    PhysicalModelProperty.Compressibility = WeaklyCompressible
    AdvancedSettingProperty.UsePseudoTime = 1
    fp1: FluidProperties (default)
    init1: init "Initial Values - Air" (default)
    wallbc1: WallBC "Pipe" (default)
    inl1: InletBoundary "Air Inlet" on boundaries 3
      BoundaryCondition = Velocity
      U0in = 5[m/s]*step1(t[1/s])
      Uav = 5[m/s]*step1(t[1/s])
    out1: OutletBoundary "Air Outlet" on boundaries 1, 2, 4, 5 | SuppressBackflow = 1
    inl2: InletBoundary "Water Inlet" on boundaries 14
      BoundaryCondition = Velocity
      ComponentWise = NormalInflowVelocity
      U0in = 0.1
      u0 = {0, 10[cm/s]*step1(t[1/s]), 0}
      LaminarInflowOption = Uav
      Uav = 5[cm/s]
      V0 = 10^-3
      Lentr = 10[mm]
    out2: OutletBoundary "Water Outlet" on boundaries 15 | SuppressBackflow = 1
    fan1: ExtFan "Fan 1" (disabled) on boundaries 3 | pinput = 10; V0fd = 0.01[m^3/s]
    init2: init "Initial Values - Water" on domains 3 | u_init = {0, 0.1, 0}
    sym1: Symmetry on boundaries 20-24

Multiphysics
  nitf1: NonIsothermalFlow on all domains | Fluid_physics = spf; Heat_physics = ht

Mesh
  mesh1 "Mesh 1" (physics-controlled)
    size: MeshSizeDefault | hauto = 6

Studies
  std1 "Study 1"
    stat: Stationary
    time: Transient "Time Dependent" | tlist = range(0,0.5,50)

Solver configurations
  sol1 "Solution 1" (study std1)
    v1: Variables "Dependent Variables 1"
    s1: Stationary "Stationary Solver 1"
      se1: Segregated | maxsegiter = 200; segstabacc = segcflcmp
        ss1: SegregatedStep "Velocity u, Pressure p" | segvar = {comp1_u, comp1_p}; linsolver = d1; subdamp = 0.5
        ss2: SegregatedStep "Temperature T, Surface radiosity ht.J" | segvar = {comp1_T}; linsolver = d2; subdamp = 0.8
        ll1: LowerLimit | lowerlimit = comp1.T 0
      d1: Direct | linsolver = pardiso
      d2: Direct | linsolver = pardiso
    su1: StoreSolution
    v2: Variables "Dependent Variables 2" | initmethod = sol; notsolmethod = sol
    t1: Time "Time-Dependent Solver 1"
      tlist = range(0,0.5,50)
      atolglobalfactor = 0.05
      atolmethod = {comp1_p, scaled, comp1_T, global, comp1_u, global}
      atolvaluemethod = {comp1_p, factor, comp1_T, factor, comp1_u, factor}
      atolfactor = {comp1_p, 1, comp1_T, 0.1, comp1_u, 0.1}
      maxorder = 2
      stabcntrl = on
      estrat = exclude
      se1: Segregated | maxsegiter = 10
        ss1: SegregatedStep "Velocity u, Pressure p"
          segvar = {comp1_u, comp1_p}
          linsolver = d1
          subdamp = 0.8
          subjtech = once
        ss2: SegregatedStep "Temperature T, Surface radiosity ht.J"
          segvar = {comp1_T}
          linsolver = d2
          subdamp = 0.8
          subjtech = once
        ll1: LowerLimit | lowerlimit = comp1.T 0
      d1: Direct | linsolver = pardiso
      d2: Direct | linsolver = pardiso
  sol2 "Solution Store 1" (study std1)

Datasets
  mesh1: Mesh | mesh = mesh1
  dset1: Solution | solution = sol1
  surf1: Surface "Exterior Walls" on boundaries 1, 3, 4, 6, 7 | data = dset1
  surf2: Surface "Exterior Walls 1" on boundaries 12-15 | data = dset1
  surf3: Surface "Exterior Walls 2" on boundaries 1, 3, 4, 6, 7, 12, 13 | data = dset1
  dset2: Solution | solution = sol2
  ps1: ParSurface "Parameterized Surface 1"
    data = dset1
    par1 = theta
    parmin1 = 90
    parmax1 = 180
    par2 = h
    parmax2 = hp
    exprx = od/2*cos(theta)
    expry = h
    exprz = od/2*sin(theta)

Plots
  pg1: PlotGroup3D "3D Plot Group 1" | data = mesh1
    mesh1: Mesh | meshdomain = volume
  pg2: PlotGroup3D "Temperature (ht)" | data = dset1
    surf1: Surface | expr = T
    slc1: Slice (disabled) | expr = T; quickplane = zx; quickxnumber = 1; quickynumber = 1
    surf2: Surface (disabled) | data = surf1; expr = T
    slc2: Slice (disabled) | expr = T; quickxnumber = 1
  pg3: PlotGroup3D "Isothermal Contours (ht)" | data = dset1
    iso1: Isosurface | expr = T
  pg4: PlotGroup3D "Velocity (spf)" | data = dset1
    slc1: Slice (disabled)
      data = dset1
      expr = spf.U
      unit = m/s
      descr = Velocity magnitude
      quickplane = zx
      quickznumber = 1
      quickynumber = 1
      shift = -0.035
    str1: Streamline | expr = {u, v, w}; descr = Velocity field
  pg5: PlotGroup3D "Pressure (spf)" | data = surf3
    surf1: Surface | expr = 1
    con1: Contour "Pressure" | expr = p
  pg6: PlotGroup3D "3D Plot Group 6" | data = mesh1
    mesh1: Mesh | meshdomain = volume
  pg7: PlotGroup3D "3D Plot Group 7" | data = dset1
    surf1: Surface | data = surf2; expr = T

Exports
  data1: Data | data = ps1; expr = T; filename = C:\Users\munna\Desktop\pipe.txt