// COMSOL Multiphysics 5.3.0.223 model "Sim1.mph"
// Correct Simulation to replicate the paper
// This is the 2nd correct simulation, should try to now incorporate  the correct material and check upon radiative heat transfer
// Outline of the model tree

Parameters
  id = (113-15)[mm]  // inlet diameter of pipe
  od = 113[mm]  // outlet diameter of pipe
  hp = 500[mm]  // height of pipe
  cd = (od-id)/2*0.509  // cut depth -1
  t = 0[s]  // Initial time
  cl = hp*0.108  // cut length
  cp = hp/2-cl/2  // cut position
  theta = 101.78  // angular length
  theta_pos = 90  // angular pos

Functions
  step1: Step | location = 0.05

Geometry
  geom1 "Geometry 1" (3D, length unit m)
    wp1: WorkPlane | unite = on
      r1: Rectangle | pos = {id/2, 0}; size = {(od-id)/2, hp}
    rev1: Revolve | workplane = wp1; input = wp1; angtype = full
    wp2: WorkPlane | unite = on
      r2: Rectangle | pos = {id/2, cp}; size = {cd, cl}
    rev2: Revolve | workplane = wp2; input = wp2; angle1 = theta_pos-theta/2; angle2 = theta_pos+theta/2
    dif1: Difference | input = rev1; input2 = rev2
    blk1: Block | pos = {0, hp/2, 0}; base = center; size = {od*3, hp, od*5}
    blk2: Block | pos = {od*0.75, hp/2, 0}; base = center; size = {od*1.5, hp, od*5}
    dif2: Difference | input = blk1, dif1; input2 = blk2
    fin: Finalize "Form Union"

Materials
  mat1: Common "Air" on domains 1, 3
    def "Basic"
      relpermeability = 1
      relpermittivity = 1
      dynamicviscosity = eta(T[1/K])[Pa*s]
      ratioofspecificheat = 1.4
      electricconductivity = 0[S/m]
      heatcapacity = Cp(T[1/K])[J/(kg*K)]
      density = rho(pA[1/Pa],T[1/K])[kg/m^3]
      thermalconductivity = k(T[1/K])[W/(m*K)]
      soundspeed = cs(T[1/K])[m/s]
      eta: Piecewise | arg = T; pieces = {200.0, 1600.0, -8.38278E-7+8.35717342E-8*T^1-7.69429583E-11*T^2+4.6437266E-14*T^3-1.06585607E-17*T^4}
      Cp: Piecewise | arg = T; pieces = {200.0, 1600.0, 1047.63657-0.372589265*T^1+9.45304214E-4*T^2-6.02409443E-7*T^3+1.2858961E-10*T^4}
      rho: Analytic | expr = pA*0.02897/8.314/T; args = {pA, T}; dermethod = manual; argders = {{pA, d(pA*0.02897/8.314/T,pA)}, {T, d(pA*0.02897/8.314/T,T)}}
      k: Piecewise | arg = T; pieces = {200.0, 1600.0, -0.00227583562+1.15480022E-4*T^1-7.90252856E-8*T^2+4.11702505E-11*T^3-7.43864331E-15*T^4}
      cs: Analytic | expr = sqrt(1.4*287*T); args = T; dermethod = manual; argders = {T, d(sqrt(1.4*287*T),T)}
    RefractiveIndex
      n = 1
      ki = 0
  mat2: Common "Aluminum 6063-T83" on domains 2
    def "Basic"
      relpermeability = 1
      electricconductivity = 3.030e7[S/m]
      thermalexpansioncoefficient = 23.4e-6[1/K]
      heatcapacity = 900[J/(kg*K)]
      relpermittivity = 1
      density = 2700[kg/m^3]
      thermalconductivity = 201[W/(m*K)]
    Enu "Young's modulus and Poisson's ratio"
      youngsmodulus = 69e9[Pa]
      poissonsratio = 0.33
  mat3: Common "Water, liquid" on no domains
    def "Basic"
      dynamicviscosity = eta(T[1/K])[Pa*s]
      ratioofspecificheat = 1.0
      electricconductivity = 5.5e-6[S/m]
      heatcapacity = Cp(T[1/K])[J/(kg*K)]
      density = rho(T[1/K])[kg/m^3]
      thermalconductivity = k(T[1/K])[W/(m*K)]
      soundspeed = cs(T[1/K])[m/s]
      eta: Piecewise
        arg = T
        pieces = 
          {273.15, 413.15, 1.3799566804-0.021224019151*T^1+1.3604562827E-4*T^2-4.6454090319E-7*T^3+8.9042735735E-10*T^4-9.0790692686E-13*T^5+3.8457331488E-16*T^6}
          {413.15, 553.75, 0.00401235783-2.10746715E-5*T^1+3.85772275E-8*T^2-2.39730284E-11*T^3}
      Cp: Piecewise | arg = T; pieces = {273.15, 553.75, 12010.1471-80.4072879*T^1+0.309866854*T^2-5.38186884E-4*T^3+3.62536437E-7*T^4}
      rho: Piecewise | arg = T; pieces = {273.15, 553.75, 838.466135+1.40050603*T^1-0.0030112376*T^2+3.71822313E-7*T^3}
      k: Piecewise | arg = T; pieces = {273.15, 553.75, -0.869083936+0.00894880345*T^1-1.58366345E-5*T^2+7.97543259E-9*T^3}
      cs: Interpolation | table = {{273, 1403}, {278, 1427}, {283, 1447}, {293, 1481}, {303, 1507}, {313, 1526}, {323, 1541}, {333, 1552}, {343, 1555}, {353, 1555}, {363, 1550}, {373, 1543}}; interp = piecewisecubic
  mat4: Common "Silica glass" (disabled) on domains 2
    def "Basic"
      relpermeability = 1
      electricconductivity = 1e-14[S/m]
      thermalexpansioncoefficient = 0.55e-6[1/K]
      heatcapacity = 703[J/(kg*K)]
      relpermittivity = 2.09
      density = 2203[kg/m^3]
      thermalconductivity = 1.38[W/(m*K)]
    Enu "Young's modulus and Poisson's ratio"
      youngsmodulus = 73.1e9[Pa]
      poissonsratio = 0.17
    RefractiveIndex
      n = 1.45
      ki = 0

Physics
  ht: HeatTransferInSolidsAndFluids "Heat Transfer" on domains 1-3
    dependent variable T
    ShapeProperty.order_temperature = 1
    PhysicalModelProperty.SurfaceToSurfaceRadiation = 1
    solid1: SolidHeatTransferModel "Pipe" (default)
      opac1: Opacity (default)
        opacity = 1
        opacitySolarB1 = 1
        opacitySolarB2 = 1
        opacityB1 = 1
        opacityB2 = 1
        opacityB3 = 1
        opacityB4 = 1
        opacityB5 = 1
    fluid1: FluidHeatTransferModel "Air" on domains 1, 3
      opac1: Opacity (default)
    init1: init "Initial Values - Air" (default) | Tinit_src = root.comp1.ht.T_amb
    ins1: ThermalInsulation (default)
    fluid2: FluidHeatTransferModel "Water" on no domains
      opac1: Opacity (default)
    temp1: TemperatureBoundary "Inlet Water Temperature" on boundaries 14 | T0 = 500[K]
    ofl1: ConvectiveOutflow "Air Outlet" on boundaries 1, 2, 4, 5
    ofl2: ConvectiveOutflow "Water Outlet" on boundaries 15
    init2: init "Initial Values - Water +Pipe" on domains 2 | Tinit = 500[K]
    temp2: TemperatureBoundary "Boundary Air temperature" on boundaries 3 | T0_src = root.comp1.ht.T_amb
    ds1: DiffuseSurface on boundaries 6, 7
      IncludeSurfaceToSurfaceRadiation = 0
      epsilon_rad_mat = userdef
      epsilon_rad = 0.2
    sym1: Symmetry on boundaries 20-24
  spf: LaminarFlow on domains 1, 3
    dependent variable u = {u, v, w}
    PhysicalModelProperty.Compressibility = WeaklyCompressible
    AdvancedSettingProperty.UsePseudoTime = 1
    fp1: FluidProperties (default)
    init1: init "Initial Values - Air" (default)
    wallbc1: WallBC "Pipe" (default)
    inl1: InletBoundary "Air Inlet" on boundaries 3 | U0in = 5[m/s]*step1(t[1/s]); Uav = 5[m/s]*step1(t[1/s])
    out1: OutletBoundary "Air Outlet" on boundaries 1, 2, 4, 5
    inl2: InletBoundary "Water Inlet" on boundaries 14
      U0in = 0.1
      u0 = {0, 10[cm/s]*step1(t[1/s]), 0}
      Uav = 5[cm/s]
      V0 = 10^-3
      Lentr = 10[mm]
    out2: OutletBoundary "Water Outlet" on boundaries 15
    init2: init "Initial Values - Water" on no domains | u_init = {0, 0.1, 0}
    sym1: Symmetry on boundaries 20-24

Multiphysics
  nitf1: NonIsothermalFlow on all domains | TemperatureShapeLevel = 1; Fluid_physics = spf; Heat_physics = ht

Mesh
  mesh3 "Mesh" (physics-controlled)
    size: MeshSizeDefault | hauto = 6

Studies
  std1 "Study 1"
    stat: Stationary | mesh = {geom1, mesh3}; errestim = l2errest; rmethod = regular
    time: Transient "Time Dependent" | tlist = range(0,0.5,50)

Solver configurations
  sol1 "Solution 1" (study std1)
    v1: Variables "Dependent Variables 1"
    s1: Stationary "Stationary Solver 1"
      se1: Segregated | maxsegiter = 200; segstabacc = segcflcmp
        ss1: SegregatedStep "Velocity u, Pressure p" | segvar = {comp1_u, comp1_p}; linsolver = d1; subdamp = 0.5
        ss2: SegregatedStep "Temperature T, Surface radiosity ht.J" | segvar = {comp1_T}; linsolver = d2; subdamp = 0.8
        ll1: LowerLimit | lowerlimit = comp1.T 0
      d1: Direct | linsolver = pardiso
      d2: Direct | linsolver = pardiso
    su1: StoreSolution
    v2: Variables "Dependent Variables 2" | initmethod = sol; notsolmethod = sol
    t1: Time "Time-Dependent Solver 1"
      tlist = range(0,0.5,50)
      atolglobalfactor = 0.05
      atolmethod = {comp1_p, scaled, comp1_T, global, comp1_u, global}
      atolvaluemethod = {comp1_p, factor, comp1_T, factor, comp1_u, factor}
      atolfactor = {comp1_p, 1, comp1_T, 0.1, comp1_u, 0.1}
      maxorder = 2
      stabcntrl = on
      estrat = exclude
      se1: Segregated | maxsegiter = 10
        ss1: SegregatedStep "Velocity u, Pressure p"
          segvar = {comp1_u, comp1_p}
          linsolver = d1
          subdamp = 0.8
          subjtech = once
        ss2: SegregatedStep "Temperature T, Surface radiosity ht.J"
          segvar = {comp1_T}
          linsolver = d2
          subdamp = 0.8
          subjtech = once
        ll1: LowerLimit | lowerlimit = comp1.T 0
      d1: Direct | linsolver = pardiso
      d2: Direct | linsolver = pardiso

Datasets
  dset1: Solution | solution = sol1
  surf1: Surface "Exterior Walls" on boundaries 6, 7, 12, 13, 16, 18, 19 | data = dset1